Mon 09/23/2024
05:54 PM
;; 1. Based on: 001
;; 2. Description: drug
;; x1. Author: www.pkpd-info.com
$PROBLEM    PK model
 ;; Change to dataset
$INPUT      CENSOR AORTA=DROP ID DROP TIME DV AMT RATE EVID MDV
$DATA      example5.CSV IGNORE=C
$SUBROUTINE ADVAN1 TRANS2 ;; 1-compartment iv data
$PK
  CL = THETA(3) * EXP(ETA(1))
  V = THETA(4) * EXP(ETA(2))

  S1 = V   ;; scaling of compartment check units of dose and observations

$THETA  (0,0.1) ; 1 prop
 0 FIX ; 2 add
 (0,30) ; 3 CL
 (0,200) ; 4 V
  	;; set realistic initial estimates (also for proportional and additive error)
$OMEGA  BLOCK(2)
 0.03  ;             ;     IIV-CL
 0.01 0.03  ;          _  ;      IIV-V
$SIGMA  1  FIX  ; residual variability
$ERROR  	;; For calculation based on linear (non log-transformed) data
  IPRED = F
  IRES = DV-IPRED
  W = IPRED*THETA(1)+THETA(2)
  IF (W.EQ.0) W = 1
  IWRES = IRES/W
  Y= IPRED+W*ERR(1)

$ESTIMATION METHOD=1 MAXEVAL=99999 SIG=3 PRINT=5 NOABORT POSTHOC
            INTERACTION ;; Estimation method FOCE+interaction
$COVARIANCE PRINT=E UNCONDITIONAL
$TABLE      ID IPRED IWRES CWRES EVID MDV TIME NOPRINT ONEHEADER
            FILE=SDTAB001
$TABLE      ID CL V ETA1 ETA2 NOPRINT ONEHEADER FILE=PATAB001
$TABLE      ID NOPRINT ONEHEADER FILE=COTAB001
$TABLE      ID NOPRINT ONEHEADER FILE=CATAB001

NM-TRAN MESSAGES
 WARNINGS AND ERRORS (IF ANY) FOR PROBLEM    1
 (WARNING  2) NM-TRAN INFERS THAT THE DATA ARE POPULATION.
Note: Analytical 2nd Derivatives are constructed in FSUBS but are never used.
      You may insert $ABBR DERIV2=NO after the first $PROB to save FSUBS construction and compilation time

1NONLINEAR MIXED EFFECTS MODEL PROGRAM (NONMEM) VERSION 7.5.1
 ORIGINALLY DEVELOPED BY STUART BEAL, LEWIS SHEINER, AND ALISON BOECKMANN
 CURRENT DEVELOPERS ARE ROBERT BAUER, ICON DEVELOPMENT SOLUTIONS,
 AND ALISON BOECKMANN. IMPLEMENTATION, EFFICIENCY, AND STANDARDIZATION
 PERFORMED BY NOUS INFOSYSTEMS.
 PROBLEM NO.:         1
 PK model
 TOT. NO. OF OBS RECS:     2400
 TOT. NO. OF INDIVIDUALS:      300
 ONE COMPARTMENT MODEL (ADVAN1)
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 #TBLN:      1
 #METH: First Order Conditional Estimation with Interaction
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
 #TERM:
0MINIMIZATION SUCCESSFUL
 HOWEVER, PROBLEMS OCCURRED WITH THE MINIMIZATION.
 REGARD THE RESULTS OF THE ESTIMATION STEP CAREFULLY, AND ACCEPT THEM ONLY
 AFTER CHECKING THAT THE COVARIANCE STEP PRODUCES REASONABLE OUTPUT.
 NO. OF FUNCTION EVALUATIONS USED:      508
 NO. OF SIG. DIGITS IN FINAL EST.:  4.0

 ETABAR IS THE ARITHMETIC MEAN OF THE ETA-ESTIMATES,
 AND THE P-VALUE IS GIVEN FOR THE NULL HYPOTHESIS THAT THE TRUE MEAN IS 0.

 ETABAR:         1.0281E-03 -9.2131E-04
 SE:             4.7104E-02  1.2299E-02
 N:                     300         300

 P VAL.:         9.8259E-01  9.4029E-01

 ETASHRINKSD(%)  2.4800E-01  2.0018E+00
 ETASHRINKVR(%)  4.9539E-01  3.9635E+00
 EBVSHRINKSD(%)  1.4214E-01  1.9926E+00
 EBVSHRINKVR(%)  2.8408E-01  3.9455E+00
 RELATIVEINF(%)  9.9829E+01  9.5922E+01
 EPSSHRINKSD(%)  1.2781E+01
 EPSSHRINKVR(%)  2.3929E+01


 TOTAL DATA POINTS NORMALLY DISTRIBUTED (N):         2400
 N*LOG(2PI) CONSTANT TO OBJECTIVE FUNCTION:    4410.9049593824284
 OBJECTIVE FUNCTION VALUE WITHOUT CONSTANT:   -9484.2162361576975
 OBJECTIVE FUNCTION VALUE WITH CONSTANT:      -5073.3112767752691
 REPORTED OBJECTIVE FUNCTION DOES NOT CONTAIN CONSTANT

 TOTAL EFFECTIVE ETAS (NIND*NETA):                           600


 #TERE:
 Elapsed estimation  time in seconds:    19.43
 Elapsed covariance  time in seconds:     4.04
 Elapsed postprocess time in seconds:     0.14

 ********************               FIRST ORDER CONDITIONAL ESTIMATION WITH INTERACTION              ********************
 #OBJT:**************                       MINIMUM VALUE OF OBJECTIVE FUNCTION                      ********************
 #OBJV:********************************************    -9484.216       **************************************************

 ********************               FIRST ORDER CONDITIONAL ESTIMATION WITH INTERACTION              ********************
 ********************                             FINAL PARAMETER ESTIMATE                           ********************

 THETA - VECTOR OF FIXED EFFECTS PARAMETERS   *********
         TH 1      TH 2      TH 3      TH 4
         1.01E-01  0.00E+00  1.21E+01  7.00E+01

 OMEGA - COV MATRIX FOR RANDOM EFFECTS - ETAS  ********
         ETA1      ETA2
 ETA1
+        6.69E-01
 ETA2
+        4.46E-02  4.73E-02

 SIGMA - COV MATRIX FOR RANDOM EFFECTS - EPSILONS  ****
         EPS1
 EPS1
+        1.00E+00

 OMEGA - CORR MATRIX FOR RANDOM EFFECTS - ETAS  *******
         ETA1      ETA2
 ETA1
+        8.18E-01
 ETA2
+        2.51E-01  2.17E-01

 SIGMA - CORR MATRIX FOR RANDOM EFFECTS - EPSILONS  ***
         EPS1
 EPS1
+        1.00E+00

 ********************               FIRST ORDER CONDITIONAL ESTIMATION WITH INTERACTION              ********************
 ********************                            STANDARD ERROR OF ESTIMATE                          ********************

 THETA - VECTOR OF FIXED EFFECTS PARAMETERS   *********
         TH 1      TH 2      TH 3      TH 4
         1.71E-03 .........  5.70E-01  8.97E-01

 OMEGA - COV MATRIX FOR RANDOM EFFECTS - ETAS  ********
         ETA1      ETA2
 ETA1
+        3.65E-02
 ETA2
+        1.09E-02  3.78E-03

 SIGMA - COV MATRIX FOR RANDOM EFFECTS - EPSILONS  ****
         EPS1
 EPS1
+       .........

 OMEGA - CORR MATRIX FOR RANDOM EFFECTS - ETAS  *******
         ETA1      ETA2
 ETA1
+        2.23E-02
 ETA2
+        5.59E-02  8.69E-03

 SIGMA - CORR MATRIX FOR RANDOM EFFECTS - EPSILONS  ***
         EPS1
 EPS1
+       .........

 ********************               FIRST ORDER CONDITIONAL ESTIMATION WITH INTERACTION              ********************
 ********************                          COVARIANCE MATRIX OF ESTIMATE                         ********************

            TH 1      TH 2      TH 3      TH 4      OM11      OM12      OM22      SG11
 TH 1
+        2.94E-06
 TH 2
+       ......... .........
 TH 3
+       -2.93E-05 .........  3.25E-01
 TH 4
+        1.88E-05 .........  1.29E-01  8.04E-01
 OM11
+       -3.51E-06 .........  1.44E-02  1.09E-03  1.33E-03
 OM12
+       -5.22E-07 .........  2.06E-04  3.73E-04  1.97E-04  1.20E-04
 OM22
+       -5.41E-07 .........  6.55E-05  2.22E-04  1.67E-05  1.38E-05  1.43E-05
 SG11
+       ......... ......... ......... ......... ......... ......... ......... .........

 ********************               FIRST ORDER CONDITIONAL ESTIMATION WITH INTERACTION              ********************
 ********************                          CORRELATION MATRIX OF ESTIMATE                        ********************

            TH 1      TH 2      TH 3      TH 4      OM11      OM12      OM22      SG11
 TH 1
+        1.71E-03
 TH 2
+       ......... .........
 TH 3
+       -3.00E-02 .........  5.70E-01
 TH 4
+        1.22E-02 .........  2.52E-01  8.97E-01
 OM11
+       -5.62E-02 .........  6.94E-01  3.33E-02  3.65E-02
 OM12
+       -2.78E-02 .........  3.30E-02  3.80E-02  4.94E-01  1.09E-02
 OM22
+       -8.36E-02 .........  3.04E-02  6.56E-02  1.21E-01  3.35E-01  3.78E-03
 SG11
+       ......... ......... ......... ......... ......... ......... ......... .........
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
 ********************               FIRST ORDER CONDITIONAL ESTIMATION WITH INTERACTION              ********************
 ********************                      EIGENVALUES OF COR MATRIX OF ESTIMATE                     ********************

             1         2         3         4         5         6
         1.37E-01  6.64E-01  9.91E-01  9.94E-01  1.23E+00  1.98E+00
 Elapsed finaloutput time in seconds:     2.30
 #CPUT: Total CPU Time in Seconds,       25.156
